# Лабораторна робота 1
# Варіант 10.
# Сохін Дмитро
# Тема: УЗАГАЛЬНЕНИЙ РЯД ФУР’Є ТА СИСТЕМИ БАЗИСНИХ ФУНКЦІЙ
# Мета: Закріпити на практиці поняття узагальненого ряду Фур’є; розглянути
# розклад різних типів періодичних сигналів в ортонормованих базисах Фур’є та
# Уолша, використовуючи при цьому можливості пакета MathCAD
A := 1
T := 2*π
t1 := T/2
t := 0, 0.001 .. T
f(t) :=
    |sin(t)| if 0 ≤ t < t1
    0 otherwise
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# Перший варіант
# Обчислемо коефіцієнти Фур'є:
j := sqrt(-1)
N := 10
k := 0 .. N
a[k] := 2/T*integral(f(t)*cos(2*π/T*k*t), t = 0 .. T)
b[k] := 2/T*integral(f(t)*sin(2*π/T*k*t), t = 0 .. T)
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# Виконаємо синтез сигналу:
S1(x1, M) :=
    a[0]/2 if M == 0
    a[0]/2 + sum(a[k]*cos(2*π/T*k*x1), k = 1 .. M) + sum(b[k]*sin(2*π/T*k*x1), k = 1 .. M) otherwise
# Другий варіант
A1[k] := sqrt(a[k]^2 + b[k]^2)
ψ[k] := -arg(a[k] + j*b[k])
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# Виконаємо синтез сигналу:
S2(x1, M) :=
    a[0]/2 if M == 0
    a[0]/2 + sum(A1[k]*cos(2*π/T*k*x1 + ψ[k]), k = 1 .. M) otherwise
# Третій варіант:
ω := 2*π/T
C(k) := 1/T*integral(f(t)*e^(-j*k*ω*t), t = 0 .. T)
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# Виконаємо синтез сигналу:
S3(t, M) := sum(C(k)*e^(j*k*ω*t), k = -M .. M)
# Початковий сигнал та його синтез за Фур'є:
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# Розкладемо сигнал у ряд Фур'є за системою базисних функцій Уолша-Пелі:
signum(x) := if(x == 0, 1, x/|x|)
x := -5, -4.99 .. 5
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# Розрахуємо систему функцій Радемахера та систему функцій Уолша-Пелі для N = 8:
r(k, z) := if(k == 0, 1, signum(sin(2^k*π*z)))
z := 0, 0.01 .. T
W(z) := [
    r(0, z);
    r(1, z);
    r(2, z);
    r(1, z)*r(2, z);
    r(3, z);
    r(1, z)*r(3, z);
    r(2, z)*r(3, z);
    r(1, z)*r(2, z)*r(3, z);
    r(4, z);
    r(1, z)*r(4, z);
    r(2, z)*r(4, z)
]
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# Виконаємо розклад сигналу у ряд Фур'є-Уолша:
m := 0 .. N
CC[m] := 1/T*integral(f(z)*W(z/T)[m], z = 0 .. T)
transpose(CC) == [0.333, 0, 0, -0.333, 0, -0.167, 0.167, 0]
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# Синтезуємо сигнал:
x(z, M) := sum(CC[m]*W(z/T)[m], m = 0 .. M)
# Порівняємо результати синтезу сигналів у різних системах базисних функцій:
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# Обчислимо норму похибки для кожного базису:
# Для базису Фур'є:
n := T/0.01
n = 628.319
i := 0 .. n
S11[i] := S1(i*0.01, N)
f1[i] := f(i*0.01)
εF := sum((S11[i] - f1[i])^2, i = 0 .. N)
εF = 0.00230417
# Для базису Уолша-Пелі:
x1[i] := x(i*0.01, N)
εUP := sum((x1[i] - f1[i])^2, i = 0 .. N)
εUP = 0.752584
